rksm
u := 1
w := 0
r := 8314.472
etano
propano
omegaa := 0.45723553
Tc1 := 305.43
Tc2 := 369.82
omegab := 0.077796074
Pc1 := 48.1595*101325
Pc2 := 41.9396*101325
r1 := 0.378893
omega1 := 0.09781
omega2 := 0.15416
r2 := 1.4897153
q1 := 0.02669
q2 := 0.03136
r3 := -0.17131848
rk1 := -2  # solo para pruebas
r4 := 0.0196554
Temp := 298
Tr2 := Temp/Tc2 = 0.805797
a(omega, Tc, Pc, Tr, q) := omegaa*(r*Tc)^2/Pc*alpha(omega, Tr)  # error: This variable is undefined.
Tr1 := Temp/Tc1 = 0.975674
Tr := 0.5
mmm(omega, r1, r2, r3, r4) := r1 + r2*omega + r3*omega^2 + r4*omega^3
x := if(Tr < 1, 1, 0) = 1
alpha(omega, Tr, q, r1, r2, r3, r4) := (1 + mmm(omega, r1, r2, r3, r4)*(1 - sqrt(Tr)) + x*q*(1 - Tr)*(0.7 - Tr))^2
alphaderiv(omega, Tr, q, r1, r2, r3, r4) := 1/sqrt(alpha(omega, Tr, q, r1, r2, r3, r4))*(-mmm(omega, r1, r2, r3, r4)*sqrt(Tr) - x*q*(3.4*Tr - 4*Tr^2))
oneover(omega, Tr, q, r1, r2, r3, r4) := 1/sqrt(alpha(omega, Tr, q, r1, r2, r3, r4))
Test
alpha(omega1, 0.5, q1, 0.378893, 1.4897153, -0.17131848, 0.0196554) = 1.33598
alphaderiv(omega1, 0.5, q1, 0.378893, 1.4897153, -0.17131848, 0.0196554) = -0.336106
Soave
alpha(omega1, 0.3, q1, 0.48508, 1.55171, -0.15613, 0) = 1.67659
alphaderiv(omega1, 0.3, q1, 0.48508, 1.55171, -0.15613, 0) = -0.282366
# Peng and Robinson
alpha(omega1, 0.5, q1, 0.37464, 1.54226, -0.2699, 0) = 1.33593
alphaderiv(omega1, 0.5, q1, 0.37464, 1.54226, -0.2699, 0) = -0.336066
# Peng and Robinson
alpha(omega1, 0.3, -rk1, 0.48508, 1.55191, -0.1563, 0) = 3.41276
alphaderiv(omega1, 0.3, -rk1, 0.48508, 1.55191, -0.1563, 0) = -0.902912
# Stryjek and vera
Tr := 0.5
svalpha := 1 + mmm(omega1, 0.378893, 1.4897153, -0.17131848, 0.0196554)*(1 - sqrt(Tr)) + q1*(1 - Tr)*(0.7 - Tr) = 1.15585
svalpha^2 = 1.33598
mmm(omega1, 0.378893, 1.4897153, -0.17131848, 0.0196554) = 0.522981
alpha(omega1, 0.3, q1, 0.378893, 1.4897153, -0.17131848, 0.0196554) = 1.54755
alphaderiv(omega1, 0.3, q1, 0.378893, 1.4897153, -0.17131848, 0.0196554) = -0.244423
alpha(omega1, Tr, q1) = ƒ(Unitless, Unitless, Unitless, Unitless) → Unitless
mmm(omega1) = ƒ(any1, any1, any1, any1) → any1
second(Tr, q) := x*q*(3.4*Tr - 4*Tr^2)
second(Tr, q1) = 0.018683
oneover(omega1, Tr, q1) = ƒ(Unitless, Unitless, Unitless, Unitless) → Unitless
alphaderiv(omega1, Tr, q1) = ƒ(Unitless, Unitless, Unitless, Unitless) → Unitless
